*Heading
** Job name: CP1000_diffusion Model name: CP1000
** Generated by: Abaqus/CAE 2023.HF4
*Preprint, echo=NO, model=NO, history=NO, contact=NO
**
** PARTS
**
*Part, name=Part-1
*Node
      1, 0.0149999997, 0.00150000001,           0.
      2, 0.0149999997, 0.00150000001, 0.00100000005
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*Element, type=C3D8T
   1,  180, 1311, 3207,  651,    1,   17,  621,   32
   2, 1311, 1312, 3208, 3207,   17,   18,  622,  621
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*Nset, nset=Set-9, generate
    1,  5780,     1
*Elset, elset=Set-9, generate
    1,  4288,     1
** Section: Section-1
*Solid Section, elset=Set-9, material=Material-1
,
*End Part
**
**
** ASSEMBLY
**
*Assembly, name=Assembly
**
*Instance, name=Part-1-1, part=Part-1
*End Instance
**
*Nset, nset=Set-2, instance=Part-1-1
   4,   7,  11,  14,  15,  49
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*Elset, elset=Set-2, instance=Part-1-1
   21,   45,   69,   93,  117,  141
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*Nset, nset=Set-3, instance=Part-1-1, generate
    1,  5780,     1
*Elset, elset=Set-3, instance=Part-1-1, generate
    1,  4288,     1
*Nset, nset=Set-4, instance=Part-1-1
    1,    2,    3,    4,    5,    6
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*Elset, elset=Set-4, instance=Part-1-1
    1,    2,    3,    4,    5,    6
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*Elset, elset=_Surf-1_S4, internal, instance=Part-1-1, generate
    4,  4288,     4
*Elset, elset=_Surf-1_S1, internal, instance=Part-1-1
 1585, 1586, 1587, 1588, 1589, 1590
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*Elset, elset=_Surf-1_S6, internal, instance=Part-1-1, generate
    1,  4285,     4
*Elset, elset=_Surf-1_S2, internal, instance=Part-1-1
    1,    2,    3,    4,    5,    6
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*Elset, elset=_Surf-1_S5, internal, instance=Part-1-1
   21,   22,   23,   24,   45,   46
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*Surface, type=ELEMENT, name=Surf-1
_Surf-1_S4, S4
_Surf-1_S1, S1
_Surf-1_S6, S6
_Surf-1_S2, S2
_Surf-1_S5, S5
*End Assembly
*Amplitude, name=Amp-1
             0.,              1.,           7200.,              1.
**
** MATERIALS
**
*Material, name=Material-1
*Density
1.,
*Depvar
     18,
*User Material, constants=27, type=THERMAL
3.,        1.,   8.31446,      300.,     2e-06,  3.07e-10, 6.022e+23, 8.518e+28
        1.,        1.,        1.,        0., 8.464e+22, 8.464e+26,   -20200.,   -58600.
   -11500.,        6.,        1., 2.866e-10, 3.571e-10,     2e+16,     1e+10,     7900.
     6e-08,   1.00784,    55.845
*User Material, constants=2, type=MECHANICAL
 2e+11, 0.3
*Time Points, name=TDS_measurement_time
120., 600., 1800., 7200.
**
** PREDEFINED FIELDS
**
** Name: Predefined Field-1   Type: Temperature
*Initial Conditions, type=TEMPERATURE
Set-3, 0.
** ----------------------------------------------------------------
**
** STEP: Step-1
**
*Step, name=Step-1, nlgeom=YES, inc=100000
*Coupled Temperature-displacement, creep=none
120., 7200.,
**
** BOUNDARY CONDITIONS
**
** Name: diffusion Type: Temperature
*Boundary, amplitude=Amp-1
Set-4, 11, 11, 8.725
**
** OUTPUT REQUESTS
**
*Restart, write, frequency=0
**
** FIELD OUTPUT: F-Output-1
**
*Output, field, time points=TDS_measurement_time
*Element Output, directions=YES
SDV,
*Output, history, frequency=0
*End Step
